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FINISH
/CLEAR,START
/COM,ANSYS RELEASE 2020 R2           BUILD 20.2      UP20200601       18:48:01
/input,start,ans,'C:\Program Files\ANSYS Inc\ANSYS Student\v211\ansys\apdl\'
!/input,start,ans,'D:\Programs\ANSYS Inc\ANSYS Student\v211\ansys\apdl\'

/AUX15
IOPTN,IGES,SMOOTH
IOPTN,MERGE,YES
IOPTN,SOLID,YES
IOPTN,SMALL,YES
IOPTN,GTOLER, DEFA
IGESIN,'A00_10','iges','..\CAD\MatchID\IGES\'
APLOT

*DIM,Material_prop,ARRAY,1,4
*CREATE,ansuitmp
*VREAD,Material_prop(1,1),Number_Materials,dat,,JIK,4,1
(F12.6,'  ',F12.6,'  ',F12.6,'  ',F12.6)
*END
/INPUT,ansuitmp

Number_of_Materials=Material_prop(1,1)      ! 1 for Homogeneous Material; 2 for Heterogeneuous Material
THICKNESS=Material_prop(1,2)
ELEMENTSZ=Material_prop(1,4)
*AFUN, DEG                                  ! Specifies units for angular functions in degrees
ang=Material_prop(1,3)                      ! off-axis angle (degrees)

/PREP7
ET,1,PLANE182
KEYOPT,1,1,0
KEYOPT,1,3,3
KEYOPT,1,6,0
R,1,THICKNESS

!*Reading Material properties

*IF,Number_of_Materials,EQ,2,THEN

    cols = Number_of_Materials
    /INQUIRE,rows,LINES,Fixed_materialproperties_Heter,dat
    *DIM,Fixed_Mat_Properties,ARRAY,rows,cols
    *CREATE,ansuitmp
    *VREAD,Fixed_Mat_Properties,Fixed_materialproperties_Heter,dat,,JIK,cols,rows
    (F12.6,'  ',F12.6)
    *END
    /INPUT,ansuitmp

    cols = Number_of_Materials
    /INQUIRE,rows,LINES,Variable_materialproperties_Heter,dat
    *DIM,Var_Mat_Properties,ARRAY,rows,cols
    *CREATE,ansuitmp
    *VREAD,Var_Mat_Properties,Variable_materialproperties_Heter,dat,,JIK,cols,rows
    (F12.6,'  ',F12.6)
    *END
    /INPUT,ansuitmp

    ! Stifness matrix [S] in the specimen coordinate system:

    !------Early Wood--------
    /INPUT,M_Srq_3D_EW,mac
    TB,ANEL,1,,,1       ! Estrutura do comando: TB, ANEL, n�mero material, num. temperatura, num. entradas, matrix de flexibilidade (1)
    ! The stress directions are parallel to the element coordinate system.
    ! Element coordinate system is paralle to the global coordinate system
    TBDATA,,S_rq_EW(1,1),S_rq_EW(2,1),S_rq_EW(3,1),S_rq_EW(4,1),S_rq_EW(5,1),S_rq_EW(6,1)
    TBDATA,,S_rq_EW(2,2),S_rq_EW(3,2),S_rq_EW(4,2),S_rq_EW(5,2),S_rq_EW(6,2),S_rq_EW(3,3)
    TBDATA,,S_rq_EW(4,3),S_rq_EW(5,3),S_rq_EW(6,3),S_rq_EW(4,4),S_rq_EW(5,4),S_rq_EW(6,4)
    TBDATA,,S_rq_EW(5,5),S_rq_EW(6,5),S_rq_EW(6,6)

    !------Late Wood--------
    /INPUT,M_Srq_3D_LW,mac
    TB,ANEL,2,,,1       ! Estrutura do comando: TB, ANEL, n�mero material, num. temperatura, num. entradas, matrix de flexibilidade (1)
    ! The stress directions are parallel to the element coordinate system.
    ! Element coordinate system is paralle to the global coordinate system
    TBDATA,,S_rq_LW(1,1),S_rq_LW(2,1),S_rq_LW(3,1),S_rq_LW(4,1),S_rq_LW(5,1),S_rq_LW(6,1)
    TBDATA,,S_rq_LW(2,2),S_rq_LW(3,2),S_rq_LW(4,2),S_rq_LW(5,2),S_rq_LW(6,2),S_rq_LW(3,3)
    TBDATA,,S_rq_LW(4,3),S_rq_LW(5,3),S_rq_LW(6,3),S_rq_LW(4,4),S_rq_LW(5,4),S_rq_LW(6,4)
    TBDATA,,S_rq_LW(5,5),S_rq_LW(6,5),S_rq_LW(6,6)

    !*Selecting EW Areas
    FLST,5,4,5,ORDE,4
    FITEM,5,2
    FITEM,5,4
    FITEM,5,6
    FITEM,5,8
    ASEL,S, , ,P51X


    !*AATT, MAT, REAL, TYPE, ESYS, SECN
    AATT,1,1,1,0,

    !*Selecting LW Areas
    FLST,5,5,5,ORDE,5
    FITEM,5,1
    FITEM,5,3
    FITEM,5,5
    FITEM,5,7
    FITEM,5,9
    ASEL,S, , ,P51X


    !*AATT, MAT, REAL, TYPE, ESYS, SECN
    AATT,2,1,1,0,

    ALLSEL,ALL

*ELSE


        cols = Number_of_Materials
    /INQUIRE,rows,LINES,Fixed_materialproperties_Homog,dat
    *DIM,Fixed_Mat_Properties,ARRAY,rows,cols
    *CREATE,ansuitmp
    *VREAD,Fixed_Mat_Properties,Fixed_materialproperties_Homog,dat,,JIK,cols,rows
    (F12.6)
    *END
    /INPUT,ansuitmp

    cols = Number_of_Materials
    /INQUIRE,rows,LINES,Variable_materialproperties_Homog,dat
    *DIM,Var_Mat_Properties,ARRAY,rows,cols
    *CREATE,ansuitmp
    *VREAD,Var_Mat_Properties,Variable_materialproperties_Homog,dat,,JIK,cols,rows
    (F12.6)
    *END
    /INPUT,ansuitmp

    ! Stifness matrix [S] in the specimen coordinate system:

    !------Early Wood--------
    /INPUT,M_Srq_3D_Homog,mac
    TB,ANEL,1,,,1       ! Estrutura do comando: TB, ANEL, n�mero material, num. temperatura, num. entradas, matrix de flexibilidade (1)
    ! The stress directions are parallel to the element coordinate system.
    ! Element coordinate system is paralle to the global coordinate system
    TBDATA,,S_rq_Homog(1,1),S_rq_Homog(2,1),S_rq_Homog(3,1),S_rq_Homog(4,1),S_rq_Homog(5,1),S_rq_Homog(6,1)
    TBDATA,,S_rq_Homog(2,2),S_rq_Homog(3,2),S_rq_Homog(4,2),S_rq_Homog(5,2),S_rq_Homog(6,2),S_rq_Homog(3,3)
    TBDATA,,S_rq_Homog(4,3),S_rq_Homog(5,3),S_rq_Homog(6,3),S_rq_Homog(4,4),S_rq_Homog(5,4),S_rq_Homog(6,4)
    TBDATA,,S_rq_Homog(5,5),S_rq_Homog(6,5),S_rq_Homog(6,6)

    !*Selecting Areas
    ALLSEL,ALL

    !*AATT, MAT, REAL, TYPE, ESYS, SECN
    AATT,1,1,1,0,

*ENDIF


!*  --------------------------------Element Sizing--------------------------------
AESIZE,ALL,ELEMENTSZ
!*MSHAPE, KEY (0 = Mesh with quadrilateral-shaped elements, 1 = Mesh with triangle-shaped elements), Dimension
MSHAPE,0,2D
!*MSHKEY, KEY (0 = Free Meshing, 1 = Mapped Meshing)
MSHKEY,0
AMESH,ALL

!* LEFT BOUNDARY NODES
LSEL,S,LOC,X,0 !Select line
NSll,S,1       !Select nodes associated to line
*GET,nodes_L,NODE,0,COUNT
*DIM,Coord_nodes_L,ARRAY,nodes_L,3
*VGET,Coord_nodes_L(1,1),NODE,,NLIST

*DO, i, 1, nodes_L, 1
    Coord_nodes_L(i,3)=NY(Coord_nodes_L(i,1))
*ENDDO

ALLSEL,ALL

!* RIGHT BOUNDARY NODES
ALLSEL,ALL
*GET,xmax,NODE,,MXLOC,X
LSEL,S,LOC,X,xmax !Select line
NSll,S,1          !Select nodes associated to line
*GET,nodes_R,NODE,0,COUNT
*DIM,Coord_nodes_R,ARRAY,nodes_R,3
*VGET,Coord_nodes_R(1,1),NODE,,NLIST

*DO, i, 1, nodes_R, 1
    Coord_nodes_R(i,2)= xmax
    Coord_nodes_R(i,3)=NY(Coord_nodes_R(i,1))
*ENDDO

ALLSEL,ALL
